! Battery storage for IEEE_123 feeder.
! 42 2-hour batteries, ONE (multi-phase) per bus, co-located with PV on the top 50% highest-load buses.
! KWrated = 45% of the bus load (summed over its phases); Kwhrated = 2 * KWrated.
! Total battery: 1093.50 kW / 2187.00 kWh
! Generated by add_pv_battery_123.py

New Storage.Batt_3     phases=1 bus1=3.1 kv=2.4 kva=18.0000 kvar=0 %EffCharge=95.0 %EffDischarge=95.0 Vmaxpu=1.05 Vminpu=0.95 %IdlingKw=0 kwhrated=36.0000 kwrated=18.0000 %stored=62.5 %reserve=30 DispMode=External
New Storage.Batt_6     phases=1 bus1=6.3 kv=2.4 kva=18.0000 kvar=0 %EffCharge=95.0 %EffDischarge=95.0 Vmaxpu=1.05 Vminpu=0.95 %IdlingKw=0 kwhrated=36.0000 kwrated=18.0000 %stored=62.5 %reserve=30 DispMode=External
New Storage.Batt_8     phases=1 bus1=8.3 kv=2.4 kva=18.0000 kvar=0 %EffCharge=95.0 %EffDischarge=95.0 Vmaxpu=1.05 Vminpu=0.95 %IdlingKw=0 kwhrated=36.0000 kwrated=18.0000 %stored=62.5 %reserve=30 DispMode=External
New Storage.Batt_11    phases=1 bus1=11.1 kv=2.4 kva=18.0000 kvar=0 %EffCharge=95.0 %EffDischarge=95.0 Vmaxpu=1.05 Vminpu=0.95 %IdlingKw=0 kwhrated=36.0000 kwrated=18.0000 %stored=62.5 %reserve=30 DispMode=External
New Storage.Batt_13    phases=1 bus1=13.1 kv=2.4 kva=18.0000 kvar=0 %EffCharge=95.0 %EffDischarge=95.0 Vmaxpu=1.05 Vminpu=0.95 %IdlingKw=0 kwhrated=36.0000 kwrated=18.0000 %stored=62.5 %reserve=30 DispMode=External
New Storage.Batt_18    phases=1 bus1=18.3 kv=2.4 kva=18.0000 kvar=0 %EffCharge=95.0 %EffDischarge=95.0 Vmaxpu=1.05 Vminpu=0.95 %IdlingKw=0 kwhrated=36.0000 kwrated=18.0000 %stored=62.5 %reserve=30 DispMode=External
New Storage.Batt_21    phases=1 bus1=21.1 kv=2.4 kva=18.0000 kvar=0 %EffCharge=95.0 %EffDischarge=95.0 Vmaxpu=1.05 Vminpu=0.95 %IdlingKw=0 kwhrated=36.0000 kwrated=18.0000 %stored=62.5 %reserve=30 DispMode=External
New Storage.Batt_22    phases=1 bus1=22.1 kv=2.4 kva=18.0000 kvar=0 %EffCharge=95.0 %EffDischarge=95.0 Vmaxpu=1.05 Vminpu=0.95 %IdlingKw=0 kwhrated=36.0000 kwrated=18.0000 %stored=62.5 %reserve=30 DispMode=External
New Storage.Batt_24    phases=1 bus1=24.2 kv=2.4 kva=18.0000 kvar=0 %EffCharge=95.0 %EffDischarge=95.0 Vmaxpu=1.05 Vminpu=0.95 %IdlingKw=0 kwhrated=36.0000 kwrated=18.0000 %stored=62.5 %reserve=30 DispMode=External
New Storage.Batt_26    phases=1 bus1=26.3 kv=2.4 kva=18.0000 kvar=0 %EffCharge=95.0 %EffDischarge=95.0 Vmaxpu=1.05 Vminpu=0.95 %IdlingKw=0 kwhrated=36.0000 kwrated=18.0000 %stored=62.5 %reserve=30 DispMode=External
New Storage.Batt_30    phases=1 bus1=30.1 kv=2.4 kva=18.0000 kvar=0 %EffCharge=95.0 %EffDischarge=95.0 Vmaxpu=1.05 Vminpu=0.95 %IdlingKw=0 kwhrated=36.0000 kwrated=18.0000 %stored=62.5 %reserve=30 DispMode=External
New Storage.Batt_31    phases=1 bus1=31.1 kv=2.4 kva=18.0000 kvar=0 %EffCharge=95.0 %EffDischarge=95.0 Vmaxpu=1.05 Vminpu=0.95 %IdlingKw=0 kwhrated=36.0000 kwrated=18.0000 %stored=62.5 %reserve=30 DispMode=External
New Storage.Batt_32    phases=1 bus1=32.3 kv=2.4 kva=18.0000 kvar=0 %EffCharge=95.0 %EffDischarge=95.0 Vmaxpu=1.05 Vminpu=0.95 %IdlingKw=0 kwhrated=36.0000 kwrated=18.0000 %stored=62.5 %reserve=30 DispMode=External
New Storage.Batt_35    phases=1 bus1=35.1 kv=2.4 kva=18.0000 kvar=0 %EffCharge=95.0 %EffDischarge=95.0 Vmaxpu=1.05 Vminpu=0.95 %IdlingKw=0 kwhrated=36.0000 kwrated=18.0000 %stored=62.5 %reserve=30 DispMode=External
New Storage.Batt_36    phases=1 bus1=36.3 kv=2.4 kva=18.0000 kvar=0 %EffCharge=95.0 %EffDischarge=95.0 Vmaxpu=1.05 Vminpu=0.95 %IdlingKw=0 kwhrated=36.0000 kwrated=18.0000 %stored=62.5 %reserve=30 DispMode=External
New Storage.Batt_37    phases=1 bus1=37.1 kv=2.4 kva=18.0000 kvar=0 %EffCharge=95.0 %EffDischarge=95.0 Vmaxpu=1.05 Vminpu=0.95 %IdlingKw=0 kwhrated=36.0000 kwrated=18.0000 %stored=62.5 %reserve=30 DispMode=External
New Storage.Batt_39    phases=1 bus1=39.1 kv=2.4 kva=18.0000 kvar=0 %EffCharge=95.0 %EffDischarge=95.0 Vmaxpu=1.05 Vminpu=0.95 %IdlingKw=0 kwhrated=36.0000 kwrated=18.0000 %stored=62.5 %reserve=30 DispMode=External
New Storage.Batt_40    phases=1 bus1=40.2 kv=2.4 kva=18.0000 kvar=0 %EffCharge=95.0 %EffDischarge=95.0 Vmaxpu=1.05 Vminpu=0.95 %IdlingKw=0 kwhrated=36.0000 kwrated=18.0000 %stored=62.5 %reserve=30 DispMode=External
New Storage.Batt_45    phases=1 bus1=45.2 kv=2.4 kva=18.0000 kvar=0 %EffCharge=95.0 %EffDischarge=95.0 Vmaxpu=1.05 Vminpu=0.95 %IdlingKw=0 kwhrated=36.0000 kwrated=18.0000 %stored=62.5 %reserve=30 DispMode=External
New Storage.Batt_49    phases=3 bus1=49.1.2.3 kv=4.16 kva=47.2500 kvar=0 %EffCharge=95.0 %EffDischarge=95.0 Vmaxpu=1.05 Vminpu=0.95 %IdlingKw=0 kwhrated=94.5000 kwrated=47.2500 %stored=62.5 %reserve=30 DispMode=External
New Storage.Batt_50    phases=3 bus1=50.1.2.3 kv=4.16 kva=94.5000 kvar=0 %EffCharge=95.0 %EffDischarge=95.0 Vmaxpu=1.05 Vminpu=0.95 %IdlingKw=0 kwhrated=189.0000 kwrated=94.5000 %stored=62.5 %reserve=30 DispMode=External
New Storage.Batt_51    phases=3 bus1=51.1.2.3 kv=4.16 kva=63.0000 kvar=0 %EffCharge=95.0 %EffDischarge=95.0 Vmaxpu=1.05 Vminpu=0.95 %IdlingKw=0 kwhrated=126.0000 kwrated=63.0000 %stored=62.5 %reserve=30 DispMode=External
New Storage.Batt_52    phases=1 bus1=52.3 kv=2.4 kva=18.0000 kvar=0 %EffCharge=95.0 %EffDischarge=95.0 Vmaxpu=1.05 Vminpu=0.95 %IdlingKw=0 kwhrated=36.0000 kwrated=18.0000 %stored=62.5 %reserve=30 DispMode=External
New Storage.Batt_54    phases=1 bus1=54.1 kv=2.4 kva=18.0000 kvar=0 %EffCharge=95.0 %EffDischarge=95.0 Vmaxpu=1.05 Vminpu=0.95 %IdlingKw=0 kwhrated=36.0000 kwrated=18.0000 %stored=62.5 %reserve=30 DispMode=External
New Storage.Batt_55    phases=1 bus1=55.1 kv=2.4 kva=18.0000 kvar=0 %EffCharge=95.0 %EffDischarge=95.0 Vmaxpu=1.05 Vminpu=0.95 %IdlingKw=0 kwhrated=36.0000 kwrated=18.0000 %stored=62.5 %reserve=30 DispMode=External
New Storage.Batt_60    phases=1 bus1=60.2 kv=2.4 kva=18.0000 kvar=0 %EffCharge=95.0 %EffDischarge=95.0 Vmaxpu=1.05 Vminpu=0.95 %IdlingKw=0 kwhrated=36.0000 kwrated=18.0000 %stored=62.5 %reserve=30 DispMode=External
New Storage.Batt_64    phases=1 bus1=64.3 kv=2.4 kva=18.0000 kvar=0 %EffCharge=95.0 %EffDischarge=95.0 Vmaxpu=1.05 Vminpu=0.95 %IdlingKw=0 kwhrated=36.0000 kwrated=18.0000 %stored=62.5 %reserve=30 DispMode=External
New Storage.Batt_65    phases=1 bus1=65.1 kv=2.4 kva=18.0000 kvar=0 %EffCharge=95.0 %EffDischarge=95.0 Vmaxpu=1.05 Vminpu=0.95 %IdlingKw=0 kwhrated=36.0000 kwrated=18.0000 %stored=62.5 %reserve=30 DispMode=External
New Storage.Batt_66    phases=1 bus1=66.2 kv=2.4 kva=33.7500 kvar=0 %EffCharge=95.0 %EffDischarge=95.0 Vmaxpu=1.05 Vminpu=0.95 %IdlingKw=0 kwhrated=67.5000 kwrated=33.7500 %stored=62.5 %reserve=30 DispMode=External
New Storage.Batt_67    phases=3 bus1=67.1.2.3 kv=4.16 kva=63.0000 kvar=0 %EffCharge=95.0 %EffDischarge=95.0 Vmaxpu=1.05 Vminpu=0.95 %IdlingKw=0 kwhrated=126.0000 kwrated=63.0000 %stored=62.5 %reserve=30 DispMode=External
New Storage.Batt_68    phases=1 bus1=68.3 kv=2.4 kva=33.7500 kvar=0 %EffCharge=95.0 %EffDischarge=95.0 Vmaxpu=1.05 Vminpu=0.95 %IdlingKw=0 kwhrated=67.5000 kwrated=33.7500 %stored=62.5 %reserve=30 DispMode=External
New Storage.Batt_71    phases=1 bus1=71.1 kv=2.4 kva=18.0000 kvar=0 %EffCharge=95.0 %EffDischarge=95.0 Vmaxpu=1.05 Vminpu=0.95 %IdlingKw=0 kwhrated=36.0000 kwrated=18.0000 %stored=62.5 %reserve=30 DispMode=External
New Storage.Batt_73    phases=1 bus1=73.1 kv=2.4 kva=18.0000 kvar=0 %EffCharge=95.0 %EffDischarge=95.0 Vmaxpu=1.05 Vminpu=0.95 %IdlingKw=0 kwhrated=36.0000 kwrated=18.0000 %stored=62.5 %reserve=30 DispMode=External
New Storage.Batt_75    phases=1 bus1=75.3 kv=2.4 kva=18.0000 kvar=0 %EffCharge=95.0 %EffDischarge=95.0 Vmaxpu=1.05 Vminpu=0.95 %IdlingKw=0 kwhrated=36.0000 kwrated=18.0000 %stored=62.5 %reserve=30 DispMode=External
New Storage.Batt_76    phases=1 bus1=76.3 kv=2.4 kva=18.0000 kvar=0 %EffCharge=95.0 %EffDischarge=95.0 Vmaxpu=1.05 Vminpu=0.95 %IdlingKw=0 kwhrated=36.0000 kwrated=18.0000 %stored=62.5 %reserve=30 DispMode=External
New Storage.Batt_77    phases=1 bus1=77.3 kv=2.4 kva=18.0000 kvar=0 %EffCharge=95.0 %EffDischarge=95.0 Vmaxpu=1.05 Vminpu=0.95 %IdlingKw=0 kwhrated=36.0000 kwrated=18.0000 %stored=62.5 %reserve=30 DispMode=External
New Storage.Batt_78    phases=3 bus1=78.1.2.3 kv=4.16 kva=110.2500 kvar=0 %EffCharge=95.0 %EffDischarge=95.0 Vmaxpu=1.05 Vminpu=0.95 %IdlingKw=0 kwhrated=220.5000 kwrated=110.2500 %stored=62.5 %reserve=30 DispMode=External
New Storage.Batt_79    phases=1 bus1=79.2 kv=2.4 kva=18.0000 kvar=0 %EffCharge=95.0 %EffDischarge=95.0 Vmaxpu=1.05 Vminpu=0.95 %IdlingKw=0 kwhrated=36.0000 kwrated=18.0000 %stored=62.5 %reserve=30 DispMode=External
New Storage.Batt_81    phases=1 bus1=81.1 kv=2.4 kva=18.0000 kvar=0 %EffCharge=95.0 %EffDischarge=95.0 Vmaxpu=1.05 Vminpu=0.95 %IdlingKw=0 kwhrated=36.0000 kwrated=18.0000 %stored=62.5 %reserve=30 DispMode=External
New Storage.Batt_82    phases=1 bus1=82.2 kv=2.4 kva=18.0000 kvar=0 %EffCharge=95.0 %EffDischarge=95.0 Vmaxpu=1.05 Vminpu=0.95 %IdlingKw=0 kwhrated=36.0000 kwrated=18.0000 %stored=62.5 %reserve=30 DispMode=External
New Storage.Batt_84    phases=1 bus1=84.1 kv=2.4 kva=18.0000 kvar=0 %EffCharge=95.0 %EffDischarge=95.0 Vmaxpu=1.05 Vminpu=0.95 %IdlingKw=0 kwhrated=36.0000 kwrated=18.0000 %stored=62.5 %reserve=30 DispMode=External
New Storage.Batt_108   phases=1 bus1=108.2 kv=2.4 kva=36.0000 kvar=0 %EffCharge=95.0 %EffDischarge=95.0 Vmaxpu=1.05 Vminpu=0.95 %IdlingKw=0 kwhrated=72.0000 kwrated=36.0000 %stored=62.5 %reserve=30 DispMode=External
