// Master file for 9500-Node IEEE Test Feeder — MV Primary Reduced Circuit
// Based on: Master-unbal-initial-config.dss (canonical unbalanced case)
// Reduction: no secondary loads/xfmrs, no LoadXfmrCodes, no TriplexLines,
//            no capacitors/capcontrols, no LV DER step-up transformers,
//            RegControls already commented out in Regulators.dss and Transformers.dss.

Clear

New Circuit.final9500node_reduced

! Make the source stiff with small impedance
~ pu=1.05  r1=0  x1=0.001  r0=0  x0=0.001

Redirect  WireData.dss
Redirect  CableData.dss
! LineCodes-based line definitions (all tie switches active)
! Note: LinesSwitchesGeometry.dss has most tie switches commented out;
!       LinesSwitchesLineCodes.dss is the complete topology file.
Redirect  LineCodes.dss
!Redirect  LineGeometry.dss
! Triplex excluded (secondary network removed)
!Redirect  TriplexLineCodes.dss

! MV primary lines only — DER 480V LV lines/switches removed
Redirect  LinesSwitches_9500_noder.dss
!Redirect  LinesSwitchesLineCodes.dss

Redirect  Transformers.dss
! Note: RegControls are already commented out in Transformers.dss and Regulators.dss
!       No Disable commands needed for 9500.

! Service transformer codes excluded (secondary network removed)
!Redirect  LoadXfmrCodes.dss
! Triplex lines excluded (secondary network removed)
!Redirect  TriplexLines.dss

! Primary MV loads only (aggregated at primary buses; UnbalancedLoads.dss excluded)
Redirect  Loads_primary.dss
!Redirect  UnbalancedLoads.dss

! No capacitors
!Redirect  Capacitors.dss
!Redirect  CapControls.dss

! Regulators as fixed-ratio transformers (RegControls already commented in source)
Redirect  Regulators.dss

! Exclude Generators.dss — diesel/LNG/MT not modelled; LV step-up transformers removed
!Redirect  Generators.dss

! MV batteries (Battery1/2 at 0.48kV already commented; ESS step-up transformer removed)
Redirect  EnergyStorage_9500_noder.dss

! Primary MV PV systems
Redirect  PVSystems_primary.dss

! MV-only voltage bases (0.48 kV base excluded — no LV sub-networks)
Set voltagebases=[115, 69, 12.47]
Calcvoltagebases

! Normal feeder open switches (same as Master-unbal-initial-config.dss)
open Line.WF856_48332_sw
open Line.WG127_48332_sw
open LINE.LN0653457_SW
open LINE.V7173_48332_SW
open LINE.TSW803273_SW
open LINE.A333_48332_SW
open LINE.TSW320328_SW
open LINE.A8645_48332_SW
open LINE.TSW568613_SW

BatchEdit Line..* C1=0 C0=0
Set ControlMode = OFF

Set Maxiterations=30 MaxControlIter=100
